СТ := 926557.88
Дир := 50000
Д := 8
ГлБух := 30000
ПБК := 17%
Сек := 20000
ЗОРП := 20
ДП := 200000
ФЗПАУП := Дир + ГлБух + Сек = 100000
С1К := СТ*0.08 = 74124.6
ЗСОМ := С1К*0.45 = 33356.1
Фиксированные_расходы
НРнаАУП := ФЗПАУП*10% = 10000
ПЕГК := ceil(СТ/Д) = 115820
ВСБП := ceil(СТ*ПБК/12) = 13127
ПР := 10%*НРнаАУП = 1000
ИР1 := НРнаАУП + ПЕГК + ВСБП + ПР = 139947
Переменные_издержки
ЗСОМ = 33356.1
СВ := ФЗПАУП*30% = 30000
КиРМ := С1К*1% = 741.246
НРОМ := С1К*1.5% = 1111.87
ИР2 := ЗСОМ + СВ + КиРМ + НРОМ = 65209.2
P := (С1К - ИР2)*ЗОРП - ИР1 = 38361.6
X0 := ceil(ИР1/(С1К - ИР2)) = 16
Xd := ceil((ДП + ИР1)/(С1К - ИР2)) = 39
Sm := (ИР1 + ИР2*ЗОРП)/ЗОРП = 72206.5
ИЦ := X0*С1К = 1185994
Xn := ceil((Д*ИР1)/(С1К - ИР2)) = 126
Ск := 100% - (Sm*100%/С1К) = 0.0258764
Cok := Xn/X0 = 7.875
x1 := [0; 20]
y1 := [ИР1; ИР1] = [139947; 139947]
y2 := [0; ИР2*20] = [0; 1304184]
y3 := [0; С1К*20] = [0; 1482493]
y4 := [ИР1; ИР1 + ИР2*20] = [139947; 1444131]
x2 := [X0; X0]
y5 := [0; ИЦ]
# [plot: y1, y2, y3, y4, y5 vs x1, x2]
