var := 18
Кол-во ПК в организации := 150
Кол-во пользователей в организации := 170
Валовой доход := 78880000
Средняя зарплата пользователя := 12000
ИТ- бюджет := 400000 + 150000 + 130000 + 190000 + 260000 + 100000 + 380000 + 70000 + 180000 + 300000 + 140000 + 100000 = 2400000
Среднее кол-во рабочих часов в месяце := 168
Кол-во часов на самообучение := 8
Кол-во отключений системы в месяц := 2
Средняя продолжительность отключений := 3
Количество отключенных пользователей := 20
Кол-во ПК в организации := floor(Кол-во ПК в организации + Кол-во ПК в организации*var/100) = 177
Кол-во пользователей в организации := floor(Кол-во пользователей в организации + Кол-во пользователей в организации*var/100) = 200
Валовой доход := Валовой доход + Валовой доход*var/100 = 93078400
Средняя зарплата пользователя := Средняя зарплата пользователя + Средняя зарплата пользователя*var/100 = 14160
ИТ- бюджет := ИТ- бюджет + ИТ- бюджет*var/100 = 2832000
Среднее кол-во рабочих часов в месяце := floor(Среднее кол-во рабочих часов в месяце + Среднее кол-во рабочих часов в месяце*var/100) = 198
Кол-во часов на самообучение := floor(Кол-во часов на самообучение + Кол-во часов на самообучение*var/100) = 9
Кол-во отключений системы в месяц := floor(Кол-во отключений системы в месяц + Кол-во отключений системы в месяц*var/100) = 2
Средняя продолжительность отключений := floor(Средняя продолжительность отключений + Средняя продолжительность отключений*var/100) = 3
Количество отключенных пользователей := floor(Количество отключенных пользователей + Количество отключенных пользователей*var/100) = 23
Прямые ежегодные затраты := ИТ- бюджет = 2832000
Годовая стоимость деятельности пользователя в связи с наличием у него ПК := (Средняя зарплата пользователя/Среднее кол-во рабочих часов в месяце)*(Кол-во часов на самообучение*12) = 7723.64
Ежегодные затраты пользователей на ИС := Годовая стоимость деятельности пользователя в связи с наличием у него ПК*Кол-во пользователей в организации = 1544727
Часовая оплата пользователя := Средняя зарплата пользователя/Среднее кол-во рабочих часов в месяце = 71.5152
Доход на каждого работника := ((Валовой доход/12)/Среднее кол-во рабочих часов в месяце)/Кол-во пользователей в организации = 195.872
Простои := Кол-во отключений системы в месяц*Средняя продолжительность отключений*12 = 72
Ежегодные расходы на простои системы := (Доход на каждого работника + Часовая оплата пользователя)*Простои*Количество отключенных пользователей = 442793
Косвенные ежегодные затраты := Ежегодные затраты пользователей на ИС + Ежегодные расходы на простои системы = 1987520
ТСО := Прямые ежегодные затраты + Косвенные ежегодные затраты = 4819520
ТСО в расчете на один ПК := ТСО/Кол-во ПК в организации = 27228.9
