Стартовые инвестиции, Ic := 110000
Ставка дисконтирования, i := 0.11
Горизонт расчета проекта (кол-во лет), n := 3
Приток средств в 1-й год, DP1 := 70000
Приток средств во 2-й год, DP2 := 70000
Приток средств в 3-й год, DP3 := 70000
Отток средств в 1-й год, Z1 := 20000
Отток средств во 2-й год, Z2 := 15000
Отток средств в 3-й год, Z3 := 10000
Ic := Стартовые инвестиции, Ic
i := Ставка дисконтирования, i
n := Горизонт расчета проекта (кол-во лет), n
DP := [70000; 70000; 70000]
Z := [20000; 15000; 10000]
CF := DP - Z = [50000; 55000; 60000]
NPV := sum(CF[k]/(1 + i)^(k + 1), k = 0 .. n - 1) - Ic = 23555.8
ROI := NPV/Ic*100 = 21.4143
PI := sum(CF[k]/(1 + i)^(k + 1), k = 0 .. n - 1)/Ic = 1.21414
k := 0 .. 2
R[k] := CF[k]/(1 + i)^(k + 1)
R = [45045; 44639.2; 43871.5]
NPV[0] := -Ic
NPV[1] := -Ic + R[0]
NPV[2] := NPV[1] + R[1]
NPV[3] := NPV[2] + R[2]
NPV = [-110000; -64955; -20315.7; 23555.8]
year := [0; 1; 2; 3]
k := 2
PBP_point := NPV[k]/(NPV[k] - NPV[k + 1]) + k = 2.46307
PBP := k + |NPV[k]|/R[k] = 2.46307
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root(sum(CF[k]/(1 + i)^(k + 1), k = 0 .. n - 1) - Ic, i)*100 = 22.562
