# Срок разработки
Д := 6
# Размерность системы
R := 5000
N := 11
K1 := 12
M := 14
# Количество функциональных точек
F := 1300
# Коэффициент внешней среды
V := 40
# Ставка программиста
S := 19000
P := 220
T := R/P = 22.7273
Z := floor(T/Д) = 3
R := 2*N*5*K1*10*M = 184800
θ := 0.00808
T := 0.01*R*θ = 14.9318
Z := floor(T/Д) = 2
W := 0.65 + (0.01*V) = 1.05
R_F := F*W = 1365
LOC := 38
R_LOC := R_F*LOC = 51870
R_KLOC := R_LOC/1000 = 51.87
A := 3
E := 1.12
T := A*R_KLOC^E/12 = 20.8279
Z := floor(T/Д) = 3
T := 14.932
α := [0.1; 0.22; 0.405; 0.275]
β := [0.1; 0.3; 0.35; 0.25]
Z := 2
i := 0 .. 3
Z_step[i] := floor(α[i]*T/(β[i]*Д))
Z_step = [2; 1; 2; 2]
Д_step[i] := β[i]*Д
Д_step = [0.6; 1.8; 2.1; 1.5]
P := [0.4, 0.2, 0.4; 0.35, 0.35, 0.3; 0.1, 0.65, 0.25; 0.15, 0.6, 0.25]
j := 0 .. 2
Z_table[i, j] := P[i, j]*Z_step[i]
Z_table = [0.8, 0.4, 0.8; 0.35, 0.35, 0.3; 0.2, 1.3, 0.5; 0.3, 1.2, 0.5]
coef := [1.3; 1; 0.7] = [1.3; 1; 0.7]
S_table[i, j] := Z_table[i, j]*Д_step[i]*S*coef[j]
S_table = [11856, 4560, 6384; 15561, 11970, 7182; 10374, 51870, 13965; 11115, 34200, 9975]
S_step[i] := sum(S_table[i, j], j = 0 .. 2)
S_step = [22800; 34713; 76209; 55290]
S_total := sum(S_step[i], i = 0 .. 3) = 189012
tоп := 0.5*Д = 3
N0 := 0.0095
Zоп := tоп*N0 = 0.0285
Sоп := Zоп*tоп*S = 1624.5
Sобщ := S_total + Sоп = 190636
Фонд оплаты труда := Sобщ = 190636
Взносы в ПФР, ФСС и ФОМС := Фонд оплаты труда*0.3 = 57190.9
Увеличение стоимосты основных средств := 20000*Z = 40000
Коммунальные услуги, услуги связи := 1000*Д = 6000
Прочие расходы := 500*Д
Игого прямые затраты := Фонд оплаты труда + Взносы в ПФР, ФСС и ФОМС + Увеличение стоимосты основных средств + Коммунальные услуги, услуги связи + Прочие расходы = 296827
Фонд развития производств := Игого прямые затраты*0.1 = 29682.7
Накладные расходы := Игого прямые затраты*0.1
Всего расходов := Игого прямые затраты + Фонд развития производств + Накладные расходы = 356193
НДС := Всего расходов*0.18 = 64114.7
Игого договорная цена := Всего расходов + НДС = 420308
