var_rate := 1.11  # ИТ-бюджет (на год):
# Статистика организации:
pc := ceil(150*var_rate) = 167
users := ceil(170*var_rate) = 189
revenue := round(75650000*var_rate, 2) = 83971500
avg_salary := round(12000*var_rate, 2) = 13320
# 1. Сумма прямых затрат:
expenses := [400000; 150000; 130000; 190000; 260000; 100000; 380000; 70000; 180000; 300000; 140000; 100000]
expenses := expenses*var_rate
expenses := round(expenses, 2)
direct_costs := round(sum(expenses), 2) = 2664000  # — ПЗ
# 2. Ежегодные косвенные затраты на ИС:
# 2.1. Данные для расчета затрат пользователей на ИТ:
users = 189  # — Кп
avg_salary = 13320  # — Зп
avg_hours := ceil(168*var_rate) = 187  # — Рч
maintenance_hours := ceil(8*var_rate) = 9  # — Пч
# Годовая стоимость деятельности пользователя в связи с наличием у него ПК:
pc_user_cost := avg_salary/avg_hours*maintenance_hours*12 = 7692.83  # — Сп
# Ежегодные затраты пользователей на ИС:
year_pc_user_cost := pc_user_cost*users = 1453946  # — Спг
# 2.2. Данные для расчета стоимости простоев ИТ-системы:
shutdown := ceil(2*var_rate) = 3  # — Ко
avg_shutdown_duration := ceil(3*var_rate) = 4  # — Чо
disabled_users := ceil(20*var_rate) = 23  # — По
revenue := round(78880000*var_rate, 2) = 87556800  # — Гд
# 2.3. Промежуточные показатели:
# Часовая оплата пользователя, руб/ч.:
hourly_salary := avg_salary/avg_hours = 71.2299  # — ЧОп
# Доход на каждого работника, руб./ч.:
income_per_emp := revenue/(12*avg_hours*users) = 206.445  # — Чд
# Простои, часов в год:
downtime := shutdown*avg_shutdown_duration*12 = 144  # — Гп
# Ежегодные расходы на простои системы, руб./год:
annual_downtime_cost := (income_per_emp + hourly_salary)*downtime*disabled_users = 919661  # — Спр
# Общая сумма косвенных затрат:
indirect_costs := year_pc_user_cost + annual_downtime_cost = 2373606  # — Кз
# 3. Итоговая сумма TCO:
total_cost_ownership := direct_costs + indirect_costs = 5037606
